# Two independent instances of pair_style runner in one simulation.
#
# Every pair_style runner instance owns an independent RuNNer potential
# (handle-based library interface), so multiple instances can be combined
# through pair_style hybrid/overlay. This input overlays the SAME 2G water
# potential twice: the pair energy must therefore be exactly twice the
# energy of the single-instance run (in.ml-runner.H2O with run 0), which
# makes this a sharp correctness check for instance independence.

units metal

boundary p p p
atom_style atomic
read_data "H2O.data"

##########################
#   ML-RuNNer Settings   #
##########################
pair_style hybrid/overlay &
  runner dir 2G-H2O-HDNNP cflength 1.889726124626 cfenergy 0.036749322175655 &
  runner dir 2G-H2O-HDNNP cflength 1.889726124626 cfenergy 0.036749322175655
pair_coeff * * runner 1 1 8
pair_coeff * * runner 2 1 8

thermo 1
thermo_style custom step temp epair etotal fmax fnorm press
thermo_modify format line "%8d %8.3f %15.8f %15.8f %9.4f %9.4f %9.2f"

run 0
